*Heading
** Job name: Job-1 Model name: Model-1
** Generated by: Abaqus/CAE 6.14-4
**Preprint, echo=NO, model=NO, history=NO, contact=NO
**
** PARTS
**
**Part, name=Part-8
*Node
      1,   2385.63037,   1687.18811
      2,   2389.63037,   1687.18811
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*Element, type=CPS8R
1,    1, 1113, 1114,    4, 4159, 4160, 4161, 4162
2, 1113,    2,    3, 1114, 4163, 4164, 4165, 4160
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*Nset, nset=fluid
     1,     2,     3,     4,     5,     6
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*Elset, elset=fluid
    1,    2,    3,    4,    5,    6
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*Nset, nset=Set-2
     3,     4,     7,     8,    11,    12
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*Elset, elset=Set-2
    7,    8,    9,   10,   11,   12
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*Nset, nset=solid
     3,     4,     7,     8,    11,    12
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*Elset, elset=solid
    7,    8,    9,   10,   11,   12
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*Nset, nset=PUMP1
     5,     6,     7,     8,     9,    10
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*Elset, elset=PUMP1
    3,    4,    5,    6, 3893, 3894
*Nset, nset=PUMP2
     1,     2,     3,     4,   433,   436
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*Elset, elset=PUMP2
    1,    2, 3896, 3897
*Nset, nset=Source2
   406,   407,  1066,  1067,  1070,  1073
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*Elset, elset=Source2
 3898, 3899, 3900, 3901, 3902, 3927, 3928, 3929, 3930, 3931, 3932, 3933, 3934, 3935, 3936
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**End Part
**
**
** ASSEMBLY
**
*Assembly, name=Assembly
**
*Instance, name=Part-8-1, part=Part-8
*End Instance
**
*End Assembly
**
** MATERIALS
**
*Material, name=fluid
*Elastic
 2.1e+11, 0.3
*Material, name=solid
*Elastic
210., 0.3
** ----------------------------------------------------------------
**
** STEP: Step-1
**
*Step, name=Step-1, nlgeom=YES
*Static
1., 1., 1e-05, 1.
**
** OUTPUT REQUESTS
**
*Restart, write, frequency=0
**
** FIELD OUTPUT: F-Output-1
**
*Output, field, variable=PRESELECT
**
** HISTORY OUTPUT: H-Output-1
**
*Output, history, variable=PRESELECT
*End Step
