*Heading
**E:\personal data\Summer internship\work_dir\nonliner_FEM_basic\assemble\vol_large.inp
*NODE
1, 0, 0, 0
2, 10, 0, 0
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******* E L E M E N T S *************
*ELEMENT, type=C3D4, ELSET=Volume1
1, 3642, 4056, 3633, 4067
2, 4059, 4064, 4052, 4094
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*ELEMENT, type=C3D4, ELSET=Volume2
908, 4104, 4096, 4107, 4115
909, 4101, 4107, 4096, 4115
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*ELEMENT, type=C3D4, ELSET=Volume3
1792, 1081, 4137, 1076, 4151
1793, 4140, 4149, 4156, 4174
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*ELEMENT, type=C3D4, ELSET=Volume4
2672, 919, 4178, 916, 4191
2673, 4178, 4184, 919, 4190
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*ELEMENT, type=C3D4, ELSET=Volume5
3532, 1174, 4227, 4221, 4229
3533, 3899, 4222, 4220, 4232
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*ELEMENT, type=C3D4, ELSET=Volume6
4433, 1023, 4266, 4273, 4275
4434, 4265, 4267, 4262, 4283
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*ELSET,ELSET=PhysicalVolume1
1, 2, 3, 4, 5, 6
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*ELSET,ELSET=PhysicalVolume2
908, 909, 910, 911, 912, 913
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*ELSET,ELSET=PhysicalVolume3
1792, 1793, 1794, 1795, 1796, 1797
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*ELSET,ELSET=PhysicalVolume4
2672, 2673, 2674, 2675, 2676, 2677
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*ELSET,ELSET=PhysicalVolume5
3532, 3533, 3534, 3535, 3536, 3537
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*ELSET,ELSET=PhysicalVolume6
4433, 4434, 4435, 4436, 4437, 4438
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*ELSET,ELSET=PhysicalVolume7
5317, 5318, 5319, 5320, 5321, 5322
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*ELSET,ELSET=PhysicalVolume8
6172, 6173, 6174, 6175, 6176, 6177
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*ELSET,ELSET=PhysicalVolume9
7014, 7015, 7016, 7017, 7018, 7019
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*ELSET,ELSET=PhysicalVolume10
7846, 7847, 7848, 7849, 7850, 7851
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*ELSET,ELSET=PhysicalVolume11
8676, 8677, 8678, 8679, 8680, 8681
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*ELSET,ELSET=PhysicalVolume12
9082, 9083, 9084, 9085, 9086, 9087
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*ELSET,ELSET=PhysicalVolume13
9488, 9489, 9490, 9491, 9492, 9493
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*ELSET,ELSET=PhysicalVolume14
9894, 9895, 9896, 9897, 9898, 9899
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*ELSET,ELSET=PhysicalVolume15
10309, 10310, 10311, 10312, 10313, 10314
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*ELSET,ELSET=PhysicalVolume16
11068, 11069, 11070, 11071, 11072, 11073
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*ELSET,ELSET=PhysicalVolume17
11827, 11828, 11829, 11830, 11831, 11832
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*ELSET,ELSET=PhysicalVolume18
12578, 12579, 12580, 12581, 12582, 12583
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*ELSET,ELSET=PhysicalVolume19
13333, 13334, 13335, 13336, 13337, 13338
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*ELSET,ELSET=PhysicalVolume20
14060, 14061, 14062, 14063, 14064, 14065
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*ELSET,ELSET=PhysicalVolume21
14774, 14775, 14776, 14777, 14778, 14779
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*ELSET,ELSET=PhysicalVolume22
15539, 15540, 15541, 15542, 15543, 15544
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*ELSET,ELSET=PhysicalVolume23
16298, 16299, 16300, 16301, 16302, 16303
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*ELSET,ELSET=PhysicalVolume24
17077, 17078, 17079, 17080, 17081, 17082
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*ELSET,ELSET=PhysicalVolume25
17849, 17850, 17851, 17852, 17853, 17854
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*ELSET,ELSET=PhysicalVolume26
18627, 18628, 18629, 18630, 18631, 18632
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*ELSET,ELSET=PhysicalVolume27
19373, 19374, 19375, 19376, 19377, 19378
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*ELSET,ELSET=PhysicalVolume28
20120, 20121, 20122, 20123, 20124, 20125
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*ELSET,ELSET=PhysicalVolume29
20875, 20876, 20877, 20878, 20879, 20880
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*ELSET,ELSET=PhysicalVolume30
21623, 21624, 21625, 21626, 21627, 21628
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*NSET,NSET=PhysicalSurface1
1, 2, 3, 4, 5, 6
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*NSET,NSET=PhysicalSurface2
16, 17, 18, 34, 35, 36
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*NSET,NSET=PhysicalSurface3
3, 6, 9, 12, 15, 18
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*NSET,NSET=PhysicalSurface4
1, 4, 7, 10, 13, 16
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*NSET,NSET=PhysicalSurface5
1, 2, 3, 19, 20, 21
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*Solid Section, elset=PhysicalVolume1, material=Material-1
*Solid Section, elset=PhysicalVolume2, material=Material-2
*Solid Section, elset=PhysicalVolume3, material=Material-3
*Solid Section, elset=PhysicalVolume4, material=Material-4
*Solid Section, elset=PhysicalVolume5, material=Material-5
*Solid Section, elset=PhysicalVolume6, material=Material-6
*Solid Section, elset=PhysicalVolume7, material=Material-7
*Solid Section, elset=PhysicalVolume8, material=Material-8
*Solid Section, elset=PhysicalVolume9, material=Material-9
*Solid Section, elset=PhysicalVolume10, material=Material-10
*Solid Section, elset=PhysicalVolume11, material=Material-11
*Solid Section, elset=PhysicalVolume12, material=Material-12
*Solid Section, elset=PhysicalVolume13, material=Material-13
*Solid Section, elset=PhysicalVolume14, material=Material-14
*Solid Section, elset=PhysicalVolume15, material=Material-15
*Solid Section, elset=PhysicalVolume16, material=Material-16
*Solid Section, elset=PhysicalVolume17, material=Material-17
*Solid Section, elset=PhysicalVolume18, material=Material-18
*Solid Section, elset=PhysicalVolume19, material=Material-19
*Solid Section, elset=PhysicalVolume20, material=Material-20
*Solid Section, elset=PhysicalVolume21, material=Material-21
*Solid Section, elset=PhysicalVolume22, material=Material-22
*Solid Section, elset=PhysicalVolume23, material=Material-23
*Solid Section, elset=PhysicalVolume24, material=Material-24
*Solid Section, elset=PhysicalVolume25, material=Material-25
*Solid Section, elset=PhysicalVolume26, material=Material-26
*Solid Section, elset=PhysicalVolume27, material=Material-27
*Solid Section, elset=PhysicalVolume28, material=Material-28
*Solid Section, elset=PhysicalVolume29, material=Material-29
*Solid Section, elset=PhysicalVolume30, material=Material-30
,
*Material, name=Material-1
*elastic
200,0.3
*Density
2.
*Material, name=Material-2
*elastic
200,0.3
*Density
2.
*Material, name=Material-3
*elastic
200,0.3
*Density
2.
*Material, name=Material-4
*elastic
200,0.3
*Density
2.
*Material, name=Material-5
*elastic
200,0.3
*Density
2.
*Material, name=Material-6
*elastic
200,0.3
*Density
2.
*Material, name=Material-7
*elastic
200,0.3
*Density
2.
*Material, name=Material-8
*elastic
200,0.3
*Density
2.
*Material, name=Material-9
*elastic
200,0.3
*Density
2.
*Material, name=Material-10
*elastic
200,0.3
*Density
2.
*Material, name=Material-11
*elastic
200,0.3
*Density
2.
*Material, name=Material-12
*elastic
200,0.3
*Density
2.
*Material, name=Material-13
*elastic
200,0.3
*Density
2.
*Material, name=Material-14
*elastic
200,0.3
*Density
2.
*Material, name=Material-15
*elastic
200,0.3
*Density
2.
*Material, name=Material-16
*elastic
200,0.3
*Density
2.
*Material, name=Material-17
*elastic
200,0.3
*Density
2.
*Material, name=Material-18
*elastic
200,0.3
*Density
2.
*Material, name=Material-19
*elastic
200,0.3
*Density
2.
*Material, name=Material-20
*elastic
200,0.3
*Density
2.
*Material, name=Material-21
*elastic
200,0.3
*Density
2.
*Material, name=Material-22
*elastic
200,0.3
*Density
2.
*Material, name=Material-23
*elastic
200,0.3
*Density
2.
*Material, name=Material-24
*elastic
200,0.3
*Density
2.
*Material, name=Material-25
*elastic
200,0.3
*Density
2.
*Material, name=Material-26
*elastic
200,0.3
*Density
2.
*Material, name=Material-27
*elastic
200,0.3
*Density
2.
*Material, name=Material-28
*elastic
200,0.3
*Density
2.
*Material, name=Material-29
*elastic
200,0.3
*Density
2.
*Material, name=Material-30
*elastic
200,0.3
*Density
2.
*Step, name=Step-1, nlgeom=NO
*static
1,1,1,1
*Boundary
PhysicalSurface1, ENCASTRE
PhysicalSurface2, 1, 2, 0.
PhysicalSurface3, 1, 2, 0.
PhysicalSurface4, 1, 2, 0.
PhysicalSurface5, 1, 2, 0.
*DLOAD
, GRAV, 9.8, 0.0, 0.0, -1.0
*Output, field, variable=Preselect
*Output, history, variable=Preselect
*measure
55, 1, 8.4268364028e-12
55, 2, 1.8594513797e-12
55, 3, -3.1357215339e+00
56, 1, 1.0291603090e-11
56, 2, -1.0815230463e-10
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109, 3, -2.1224881199e+00
*End Step
